# По файлам "в помощь": | Второй вариант кривой Безье:
# Контрольные точки:
Bezier(X, Y, NT) :=
    " Х- массив х - координат опорных точек"
    " Y- массив y - координат опорных точек"
    " NT- число отрезков по параметру t"
    "Функция возвращает матрицу М из двух столбцов"
    "столбец 1 - х - координаты кривой Безье"
    "столбец 2 - у - координаты кривой Безье"
    N ← rows(X)
    Δt ← 1/NT
    XT[0] ← X[0]
    YT[0] ← Y[0]
    for k ∈ 1 .. NT
        t ← k*Δt
        "Перезапись массивов X и Y в вспомогательные массивы RX и RY"
        for m ∈ 0 .. N - 1
            RX[m] ← X[m]
            RY[m] ← Y[m]
        "Вычисление точки кривой Безье, соответствующей параметру t"
        for j ∈ N - 1 .. 1
            for i ∈ 0 .. j - 1
                RX[i] ← RX[i] + t*(RX[i + 1] - RX[i])
                RY[i] ← RY[i] + t*(RY[i + 1] - RY[i])
        "Формирование столбцов выходной матрицы М"
        XT[k] ← RX[0]
        YT[k] ← RY[0]
    M ← augment(XT, YT)
    M
P[0] := [1, 1, 0]
P[1] := [1.1, 3, 0]
P[2] := [1.5, 2.5, 0]
P[3] := [1.8, 1, 0]
P[4] := [2, 1, 0]
m := 4  # - степень полинома
P_b(t) := sum(t^i*(1 - t)^(m - i)*P[i]*m!/(i!*(m - i)!), i = 0 .. m)
x(t) := P_b(t)[0, 0]  # значения х для функции от t
y(t) := P_b(t)[0, 1]  # значения y для функции от t
x_points := transpose([P[0][0, 0], P[1][0, 0], P[2][0, 0], P[3][0, 0], P[4][0, 0]])
y_points := transpose([P[0][0, 1], P[1][0, 1], P[2][0, 1], P[3][0, 1], P[4][0, 1]])
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X := transpose([1, 3, 5])
Y := transpose([2, 5, 1])
NT := 50
M := Bezier(X, Y, NT)
XB := M[:, 0]
YB := M[:, 1]
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# Третий вариант кривой Безье:
x[0] := 1
x[1] := 1.5
x[2] := 2.5
y[0] := 0
y[1] := 3
y[2] := 1.5
P[0] := [x[0], y[0], 0]
P[1] := [x[1], y[1], 0]
P[2] := [x[2], y[2], 0]
X := transpose([P[0][0, 0], P[1][0, 0], P[2][0, 0]])
Y := transpose([P[0][0, 1], P[1][0, 1], P[2][0, 1]])
Lag(t, X, Y) :=
    s ← 0
    for i ∈ 0 .. last(X)
        p ← 1
        for k ∈ 0 .. last(X)
            if k == i
                {
                    continue
                }
            p ← p*((t - X[k])/(X[i] - X[k]))
        s ← s + Y[i]*p
    s
n := 2  # - степень полинома (кол-во точек-1)
P(u) := sum(n!/(i!*(n - 1)!)*u^i*(1 - u)^(n - i)*P[i], i = 1 .. n)
x(u) := P(u)[0, 0]  # значения х для функции от u
y(u) := P(u)[0, 1]  # значения y для функции от u
X := transpose([1, 3, 5])
Y := transpose([2, 7, 1])
Y := transpose([2, 7, -1, 5, 2])
X := transpose([1, 3, 5, 7, 9])
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